k_b := 1.38064852 × 10-23 m2 kg s-2 K-1  # error: This number contains an invalid character ' '.
h := 6.636*10^-34*m^2*kg/s
m_n := 1.675*10^-27*kg
# Atomic units length (born)
k_b := 1.38064852*10^-23*J/K
a_0 = 5.29177e-11 m
# Fe lattice constant:
5.27*a_0 = 2.78876e-10 m
f(dt, dL) := (dL*m/(dt*10^-6*s))^2*m_n/2
m_e := 9.109*10^-31*kg
eV := 1.60218*10^-19*J
mEv := 10^-3*eV
Ry := 1.36*10^4*mEv
Ei := [1, 10, 50, 100]
# LET:
# MERLIN:
L_sam := 11.8
L_mon1 := -1.63
L_mon2 := 4.22
L_mon12 := (4.247 + 1.504)*m
L_ms := □  # error: This placeholder is empty.
L_ms := 1.504*m
L_sd := 2.5*m
f(5576.82 - 2831.7, L_mon2 - L_mon1) = 23.739 mEv
f(4358 - 2774, L_mon2 - L_mon1) = 71.2976 mEv
# MAR:
L_mon1 := -1.718
L_mon2 := 8.35
f(5576.82 - 2831.7, L_mon2 - L_mon1) = 70.3133 mEv
f(5575 - 2832, L_mon2 - L_mon1) = 70.422 mEv
f(5588.91 - 2833.13, L_mon2 - L_mon1) = 69.7703 mEv
fL(x) := e - a*(1/(1 - b*sqrt(c/(2*e + x))))^2  # error: This variable is undefined.
d/dx((1/(1 - L/(T*v_i)*(1 + x)^(-1/2)))^2) → L/(T*v_i*(x + 1)^(3/2)*(L/(T*v_i*sqrt(x + 1)) - 1)^3)
